b := [0.3, 0.5, 0.7, 0.9]
a := [1.00, 0.42, 0.54, 0.66; 0.42, 1.0, 0.32, 0.44; 0.54, 0.32, 1.0, 0.22; 0.66, 0.44, 0.22, 1.0]
u := cholesky(a)
u = [1, 0, 0, 0; 0.42, 0.907524, 0, 0; 0.54, 0.102697, 0.835376, 0; 0.66, 0.179389, -0.185333, 0.7056]
y := b/transpose(u) = [0.3, 0.41211, 0.593358, 1.04598]
x := y/u = [-1.25779, 0.0434873, 1.03917, 1.48239]
# Вектор нев'язки
r := transpose(b) - a*transpose(x) = [-1.66533e-16; 0; 0; -1.11022e-16]
sol := [-1.25779, 0.04349, 1.03917, 1.48239]  # Порівняння програмного результату з рішенням mathcad
x - sol = [-3.74689e-6, -2.69561e-6, -3.7485e-6, 2.88368e-6]
# Середньоквадратична похибка
error := sqrt(1/4)*sum((transpose(sol) - transpose(x))^2, k = 1 .. 4) = [2.80783e-11; 1.45326e-11; 2.81025e-11; 1.66312e-11]
