# Оригінальна матриця А
# [2.12, 0.42, 1.34, 0.88],
# [0.42, 3.95, 1.87, 0.43],
# [1.34, 1.87, 2.98, 0.46],
# [0.88, 0.43, 0.46, 4.44],
# Оригінальний вектор b
# [11.172, 0.115, 0.009, 9.349]
A := [
    1.787, -0.758, -0.277, 0.127;
    0.42, 3.95, 1.87, 0.43;
    0.28, 1.66, 2.31, 0.02;
    0.88, 0.43, 0.46, 4.44
]
b := [13.332, 0.115, -5.577, 9.349]
jacobi :=
    "Jacobi method"
    x ← [0, 0, 0, 0]
    xnew ← x
    D_inv ← diag(1/diag(A))
    itmat ← transpose(identity(rows(A)) - D_inv*A)
    itvec ← D_inv*transpose(b)
    i ← 0
    while i < 10000
        xnew ← x*itmat + transpose(itvec)
        error ← max(vectorize(|vectorize(xnew) - vectorize(x)|))
        return transpose(xnew) if error < 0.00001
        x ← xnew
        i ← i + 1
    transpose(x)
seidel :=
    "Gauss-Seidel method"
    n ← rows(A)
    x ← vectorize(transpose([0, 0, 0, 0]))
    k ← 0
    while k < 100
        i ← 0
        xnew ← x
        while i < n
            sum1 ← 0
            j ← 0
            while j < i
                sum1 ← sum1 + A[i, j]*xnew[j]
                j ← j + 1
            sum2 ← 0
            j2 ← i + 1
            while j2 < rows(A)
                sum2 ← sum2 + A[i, j2]*x[j2]
                j2 ← j2 + 1
            xnew[i] ← (transpose(b)[i] - sum1 - sum2)/A[i, i]
            i ← i + 1
        error ← max(vectorize(|vectorize(xnew) - vectorize(x)|))
        return xnew if error < 0.00001
        k ← k + 1
        x ← xnew
    x
sum :=
    n ← 3
    "Sum of the matrix rows except diagonal"
    for i ∈ 0 .. n
        S[i] ← sum(|A[i, j]| - |A[i, i]|, j = 1 .. n)
    S
transpose(b) - A*jacobi = [2.70754e-6; 1.53055e-5; -1.17589e-5; -1.11327e-6]
jacobi = [7.2177; 1.08341; -4.0763; 0.992489]
check :=
    n ← 4
    "Check if matrix is diagonally dominant"
    for i ∈ 1 .. n
        if |A[i, i]| < sum[i]
            result ← "Матриця А не має діагональної переваги"
            break
        otherwise
            result ← "Матриця А має діагональну перевагу"
            break
    result
seidel = [7.21771; 1.08341; -4.07631; 0.99249]
transpose(b) - A*seidel = [3.85153e-6; 1.11199e-5; 2.46578e-8; 0]
sol := lsolve(A, transpose(b)) = [7.21771; 1.08342; -4.07631; 0.992489]
transpose(b) - A*sol = [0; -5.96745e-16; 0; -1.77636e-15]
python_sol := [7.21770, 1.08341, -4.07630, 0.99249]
check = "Матриця А має діагональну перевагу"
transpose(python_sol) - sol = [-8.57682e-6; -6.31158e-6; 1.13665e-5; 1.11104e-6]
# (seidel) x at iteration  1 with change (x_new - x)  7.46055
# +7.46055, -0.76416, -2.76946, +0.98790
#
# (seidel) x at iteration  2 with change (x_new - x)  1.29114
# +6.63691, +0.52698, -3.60601, +1.11277
#
# (seidel) x at iteration  3 with change (x_new - x)  0.40912
# +7.04604, +0.86593, -3.90025, +1.02934
#
# (seidel) x at iteration  4 with change (x_new - x)  0.13731
# +7.15013, +1.00324, -4.01082, +1.00686
xnew =  # error: This variable is undefined.
