M := 10
start := 0
y0 := 0.1
end := 1
stepsize := (end - start)/M = 0.1
f(x, y) := exp(-3*x)*(y^2 + 3)
u := rkfixed(y0, start, end, M, f)
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u = [
    0, 0.1;
    0.1, 0.364317;
    0.2, 0.570475;
    0.3, 0.732909;
    0.4, 0.860598;
    0.5, 0.960234;
    0.6, 1.0373;
    0.7, 1.09639;
    0.8, 1.14137;
    0.9, 1.1754;
    1, 1.20102
]
k := 10
steps := 10
start := 0
stepsize := (end - start)/steps = 0.1
D(t, y) := [y[1]; -y[0] + (k - 10)/10*y[1]]
y0 := [0.1; 0]
end := 1
us := rkfixed(y0, start, end, steps, D)
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us = [
    0, 0.1, 0;
    0.1, 0.0995004, -0.00998333;
    0.2, 0.0980067, -0.0198669;
    0.3, 0.0955337, -0.029552;
    0.4, 0.0921061, -0.0389418;
    0.5, 0.0877583, -0.0479425;
    0.6, 0.0825336, -0.0564642;
    0.7, 0.0764843, -0.0644217;
    0.8, 0.0696707, -0.0717356;
    0.9, 0.0621611, -0.0783326;
    1, 0.0540303, -0.084147
]
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