k := 0
alpha := 1
a0 := 0
a1 := -2
a2 := 1
a3 := 5
a4 := -2
a5 := 1
f(x) := a5^(1 + alpha)*x^5 + a4*x^4 + a3*x^2 + a1*x + a0*k
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bisection_method(f, a, b, eps) :=
    c ← 0
    while(b - a/2) > 0
    {
        c
        if(f(c)*f(b) > 0)
        b ← c
        □ otherwise
    } ← (a + b)/2  # error: Evaluation not allowed in this definition.
